<?xml version="1.0" encoding="UTF-8"?>
<piston_engine name="Lycoming-AEIO-360-B2F">
  <minmp unit="INHG">12</minmp>
  <maxmp unit="INHG">28.5</maxmp>
  <displacement unit="IN3">361</displacement>
  <maxhp>180</maxhp>
  <cycles>4</cycles>
  <idlerpm>500</idlerpm>
  <maxrpm>2700</maxrpm>
  <sparkfaildrop>0.1</sparkfaildrop>
  <volumetric-efficiency>0.985</volumetric-efficiency>
  <bsfc>0.44</bsfc>
  <air-intake-impedance-factor>0.1</air-intake-impedance-factor>
  <stroke unit="IN">4.375</stroke>
  <bore unit="IN">5.125</bore>
  <cylinders>4.0</cylinders>
  <compression-ratio>8.5</compression-ratio>
</piston_engine>
